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/batch
! ANSYS input file written by Workbench version 2021 R2
! File used for geometry attach: D:\GuoHB\MyFiles\Code\PyAnsysWorkbench\software\geometry\geo.scdoc
/title,wbnew--Static Structural (A5)
/com,--- Data in consistent NMM units. See Solving Units in the help system for more information.
/units,MPA
/prep7
! Turn off shape checking because checks already performed inside WB mesher.
! See help system for more information.
SHPP,OFF,,NOWARN
etcon,set             ! allow ANSYS to choose best KEYOP's for 180x elements, resets any applicable keyopt to MAPDL defaults
/com,*********** Nodes for the whole assembly ***********
nblock,3,,933
(1i9,3e20.9e3)
        1     1.900000000E+02     1.666666667E+01     1.000000000E+01
        2     1.900000000E+02     8.333333333E+00     1.000000000E+01
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-1
/com,*********** Elements for Body 1 "geo\__" ***********
et,1,186
keyo,1,2,1          ! set full integration on SOLID186
eblock,19,solid,,120
(19i9)
        1        1        1        1        0        0        0        0       20        0        1        1      209      247      249       76      246      248      251
      257      788      844      258      521      842      845      522      255      787      843      847
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-1
/com,*********** Send User Defined Coordinate System(s) ***********
csys,0
toffst,273.15,  ! Temperature offset from absolute zero
/com,*********** Set Reference Temperature ***********
tref,22.
/com,*********** Send Materials ***********
MP,DENS,1,7.85e-09,	! tonne mm^-3
MP,EX,1,209000,	! tonne s^-2 mm^-1
MP,NUXY,1,0.3,

!************************* Model Summary ********************
!geo\__,	Steel,	matid,	1
!************************* End Model Summary ********************
/com,*********** Send Named Selection as Element Component ***********
esel,s,type,,1
cm,NS_BEAMBODY,elem
esel,all
/com,*********** Send Named Selection as Node Component ***********
CMBLOCK,NS_FIXSUP,NODE,       29
(8i10)
       137       138       139       140       201       202       203       204
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/com,*********** Send Named Selection as Node Component ***********
CMBLOCK,NS_PRESS,NODE,      227
(8i10)
        77        78        79        80        81        82        83        84
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/com,*********** Fixed Supports ***********
CMBLOCK,_FIXEDSU,NODE,       29
(8i10)
       137       138       139       140       201       202       203       204
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cmsel,s,_FIXEDSU
d,all,all
nsel,all
/com,*********** Define Pressure Using Surface Effect Elements "Pressure" ***********
et,2,154
eblock,10,,,60
(15i9)
      333        2        2        2        0      118       77      116      117      526      525      623      625
      334        2        2        2        0      119       79       77      118      532      524      526      627
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-1
esel,s,type,,2
keyop,2,7,0                ! Use deformed area for application of load
esel,all
esel,all
fini
/com,****************************************************************************
/com,*************************    SOLUTION       ********************************
/com,****************************************************************************
/solu
antype,0                   ! static analysis
_thickRatio=  0     ! Ratio of thick parts in the model
eqsl,sparse,,,,,1
cntr,print,1               ! print out contact info and also make no initial contact an error
dmpoption,emat,no             ! Don't combine emat file for DANSYS
dmpoption,esav,no             ! Don't combine esav file for DANSYS
nldiag,cont,iter           ! print out contact info each equilibrium iteration
rescontrol,,none                 ! Do not keep any restart files
/com,****************************************************
/com,******************* SOLVE FOR LS 1 OF 1 ****************
esel,s,type,,2
nsle
sf,all,pres,0.5
nsel,all
esel,all
esel,all
nsub,1,1,1
time,1.
outres,erase
outres,all,none
outres,nsol,all,
outres,rsol,all
outres,eangl,all
outres,etmp,all
outres,veng,all
outres,strs,all,
outres,epel,all,
outres,eppl,all,
outres,cont,all,
! *********** WB SOLVE COMMAND ***********
! check interactive state
*get,ANSINTER_,active,,int
*if,ANSINTER_,ne,0,then
/eof
*endif
solve
/com *************** Write FE CONNECTORS *********
CEWRITE,file,ce,,INTE
/com,****************************************************
/com,*************** FINISHED SOLVE FOR LS 1 *************
/post1
fini
